// COMSOL Multiphysics 5.4.0.225 model "thermoviscous.mph"
// Outline of the model tree

Variables
  nastran2 "PSHELL 1 Import 1.1" on no domains
    thickness = 1

Selections
  nastransel1: FromMesh "All IDs Import 1"
  nastransel2: FromMesh "ID 1 Import 1"

Geometry
  geom1 "Geometry 1" (2D, length unit m)

Materials
  mat1: Common "Air(Kampinga)" on all domains
    def "Basic"
      thermalexpansioncoefficient = alpha_p(pA,T)
      molarmass = 0.02897
      bulkviscosity = 0
      dynamicviscosity = 2/3
      ratioofspecificheat = 1.406
      electricconductivity = 0[S/m]
      heatcapacity = 975.3
      density = 1.225
      thermalconductivity = 25.18*10^(-3)
      soundspeed = 341.2
      eta: Piecewise | arg = T; pieces = {200.0, 1600.0, -8.38278E-7+8.35717342E-8*T^1-7.69429583E-11*T^2+4.6437266E-14*T^3-1.06585607E-17*T^4}; argunit = K; fununit = Pa*s
      Cp: Piecewise | arg = T; pieces = {200.0, 1600.0, 1047.63657-0.372589265*T^1+9.45304214E-4*T^2-6.02409443E-7*T^3+1.2858961E-10*T^4}; argunit = K; fununit = J/(kg*K)
      rho: Analytic | expr = pA*0.02897/R_const[K*mol/J]/T; args = {pA, T}; dermethod = manual; argders = {{pA, d(pA*0.02897/R_const/T,pA)}, {T, d(pA*0.02897/R_const/T,T)}}; argunit = Pa,K; fununit = kg/m^3
      k: Piecewise | arg = T; pieces = {200.0, 1600.0, -0.00227583562+1.15480022E-4*T^1-7.90252856E-8*T^2+4.11702505E-11*T^3-7.43864331E-15*T^4}; argunit = K; fununit = W/(m*K)
      cs: Analytic | expr = sqrt(1.4*R_const[K*mol/J]/0.02897*T); args = T; dermethod = manual; argunit = K; fununit = m/s
      an1: Analytic | funcname = alpha_p; expr = -1/rho(pA,T)*d(rho(pA,T),T); args = {pA, T}; argunit = Pa, K; fununit = 1/K
      an2: Analytic "Analytic 2a" | funcname = muB; expr = 0.6*eta(T); args = T; argunit = K; fununit = Pa*s
    NonlinearModel
      BA = (def.gamma+1)/2

Physics
  ta: ThermoacousticsSinglePhysics "Thermoviscous Acoustics, Frequency Domain" on all domains
    dependent variable p
    EquationSettings.AdiabaticFormulation = 1
    tam1: ThermoviscousAcousticsModel (default) | minput_pressure_src = fromCommonDef
    wall1: Wall on boundaries 2, 3 | MechanicalCondition = Slip
    init1: init "Initial Values 1" (default)
    velt3: VelocityThermoacoustic "Velocity 3" on boundaries 1 | u0 = {1, 0, 0}; Direction = {1, 0, 0}

Mesh
  mesh1 "Mesh 1"
    imp1: Import
      source = nastran
      filename = /home/ftoth/cfs/CFS/Testsuite/TESTSUIT/Singlefield/LinFlow/PlaneWave2DBulkViscosity/recsurf.bdf
    fin: Finalize

Studies
  std1 "Study 1"
    freq: Frequency "Frequency Domain" | plist = 10000

Solver configurations
  sol1 "Solution 1" (study std1)
    v1: Variables "Dependent Variables 1"
    s1: Stationary "Stationary Solver 1"
      p1: Parametric | pname = freq; plistarr = 10000; punit = Hz; pcontinuationmode = no
      fc1: FullyCoupled | linsolver = d1
      d1: Direct | linsolver = pardiso

Datasets
  dset1: Solution | solution = sol1
  cln1: CutLine2D | data = dset1; genpoints = {{0, 0.00005}, {0.18, 0.00005}}

Plots
  pg1: PlotGroup2D "Acoustic Pressure (ta)" | data = dset1
    surf1: Surface | expr = ta.p_t
  pg2: PlotGroup2D "Acoustic Velocity (ta)" | data = dset1
    surf1: Surface | expr = ta.v_inst
  pg3: PlotGroup2D "Temperature Variation (ta)" | data = dset1
    surf1: Surface | expr = ta.T_t
  pg4: PlotGroup1D "1D Plot Group 4" | data = dset1
    lngr1: LineGraph | data = cln1; expr = real(ta.p_t)
  pg5: PlotGroup1D "1D Plot Group 5" | data = dset1
    lngr1: LineGraph | data = cln1; expr = imag(u)
  pg6: PlotGroup1D "1D Plot Group 6" | data = dset1
    lngr1: LineGraph | data = cln1; expr = real(u)
  pg7: PlotGroup1D "1D Plot Group 7" | data = dset1
    lngr1: LineGraph | data = cln1; expr = imag(ta.p_t)

Exports
  plot1: Plot "pRe"
    filename = /home/ftoth/cfs/CFS/Testsuite/TESTSUIT/Singlefield/LinFlow/PlaneWave2DDynamicViscosity/pRe.txt
  plot2: Plot "pIm"
    filename = /home/ftoth/cfs/CFS/Testsuite/TESTSUIT/Singlefield/LinFlow/PlaneWave2DDynamicViscosity/pIm.txt
  plot3: Plot "uRe"
    filename = /home/ftoth/cfs/CFS/Testsuite/TESTSUIT/Singlefield/LinFlow/PlaneWave2DDynamicViscosity/uRe.txt
  plot4: Plot "uIm"
    filename = /home/ftoth/cfs/CFS/Testsuite/TESTSUIT/Singlefield/LinFlow/PlaneWave2DDynamicViscosity/uIm.txt